OpenVSP model (file version 5), 1 components.
Geometry view with OpenVSP parameter names; values to 6 digits, angles in degrees, lengths in the model's unit.
Overall bounding box: X_Min=-0.00142198 X_Len=1.46328 Y_Min=-3.02556 Y_Len=6.05111 Z_Min=-0.081007 Z_Len=0.203705

Wing "WingGeom"
  location (X Y Z) 0 0 0, rotation 0 0 0
  symmetric about XZ
  bounding box size 1.46328 6.05111 0.203705
  totals: TotalSpan=6 TotalProjectedSpan=6 TotalChord=0.79 TotalArea=2.87 TotalAR=12.5436 MAC=0.643543
  root: chord 1.35, twist 0, NACA 5-digit CamberLoc=0.15 IdealCl=0.3 ThickChord=0.15
  sections:
    n  Span  Root_Chord  Tip_Chord  Area    Sweep  Sweep_Location  Dihedral  Twist  Twist_Location  tip airfoil
    1  0.2   1.35        1.3        0.265   15     0               0         0      0.25            as above
    2  0.1   1.3         0.95       0.1125  60     0               0         0      0.25            as above
    3  0.2   0.95        0.5        0.145   40     0               0         0      0.25            as above
    4  0.5   0.5         0.35       0.2125  20     0               0         0      0.25            as above
    5  2     0.35        0.35       0.7     15     0               0         -4     0.25            as above
